# Initialization
units		          lj
dimension 	      2
atom_style	      atomic
pair_style	      lj/cut 2.5
boundary	        p p p

# System definition
region            b block -30 30 -30 30 -0.5 0.5
create_box        2 b
create_atoms      1 random 1500 341343 b
create_atoms      2 random 100 127578 b

#Sim settings
mass              1 1
mass              2 1
pair_coeff        1 1 1.0 1.0
pair_coeff        2 2 0.5 3.0
neigh_modify      every 1 delay 5 check yes
dump              mydmp all atom 1000 dump.lammpstrj

#run
thermo            10
minimize          1.0e-4 1.0e-6 1000 1000

fix		            mynve all nve
fix		            mylgv all langevin 1.0 1.0 0.1 1530917
fix		            myefn all enforce2d
timestep	        0.005
thermo		        1000
run		            10000
